# OpenSim document version 40000
Model Sirine-scaled:
  gravity: 0 -9.80665 0
  length_units: meters
  force_units: N
  credits:
    Delp S.L., Loan J.P., Hoy M.G., Zajac F.E., Topp E.L., Rosen J.M., Thelen D.G., Anderson F.C., Seth A., Hamner S.R.
  publications:
    Whole body model that consists of 23 bodies, 42 degrees of freedom and 30 muscles. The whole-body geometric model and the lower limbs, pelvis and upper limbs anthropometry are based on the running model of Hammer et al. 2010 which consists of 12 segments and 29 degrees of freedom. Extra segments and degrees of freedom were later added based on Dumas et al. 2007. Muscles …Each lower extremity had seven degrees-of-freedom; the hip was modeled as a ball-and-socket joint (3 dofs), the knee was modeled as a revolute joint with 1 dof, the ankle was modeled as 2 revolute joints and feet toes with one revolute joint. The pelvis joint was model as a free flyer joint (6 dofs) to allow the model to translate and rotate in the 3D space, the lumbar motion was modeled as a ball-and-socket joint (3 dofs) (Anderson and Pandy, 1999) and the neck joint was modeled as a ball-and-socket joint (3 dofs). Mass properties of the torso and head (including the neck) segments were estimated from Dumas et al., 2007. Each arm consisted of 8 degrees-of-freedom; the shoulder was modeled as a ball-and-socket joint (3 dofs), the elbow and forearm rotation were each modeled with revolute joints (1 dof) (Holzbaur et al., 2005), the wrist flexion and deviation were each modeled with revolute joints and the hand fingers were modeled with 1 revolute joint. Mass properties for the arms were estimated from 1 and de Leva, 1996. The model also include 30 superficial muscles of the whole body..
  Ground
  BodySet:
    Body pelvis: mass=3.160423 [kg] mass_center=(-0.03895346 0 0) inertia=(0.0142169 0.0142169 0.00389267 0 0 0)
        meshes=(sacrum.vtp pelvis.vtp l_pelvis.vtp)
    Body femur_r: mass=2.496082 mass_center=(0 -0.1335514 0) inertia=(0.02217646 0.005813247 0.02338552 0 0 0)
        meshes=femur_r.vtp
    Body tibia_r: mass=0.9949281 mass_center=(0 -0.1518156 0) inertia=(0.0073476 0.000646798 0.0073476 0 0 0)
        meshes=(tibia_r.vtp fibula_r.vtp)
    Body talus_r: mass=0.02683555 mass_center=(0 0 0) inertia=(0.0001487027 0.0001487027 0.0001487027 0 0 0)
        meshes=talus_rv.vtp
    Body calcn_r: mass=0.3354444 mass_center=(0.07443953 0.02233187 0)
        inertia=(0.0002081832 0.0005799389 0.0006096796 0 0 0) meshes=foot.vtp
    Body toes_r: mass=0.05812581 mass_center=(0.02575612 0.004466374 -0.01302697)
        inertia=(1.487027e-5 2.974044e-5 0.0001487027 0 0 0) meshes=bofoot.vtp
    Body femur_l: mass=2.496082 mass_center=(0 -0.1351095 0) inertia=(0.02269668 0.005949628 0.02393412 0 0 0)
        meshes=femur_l.vtp
    Body tibia_l: mass=0.9949281 mass_center=(0 -0.1465 0) inertia=(0.00698459 0.000699851 0.00698459 0 0 0)
        meshes=(tibia_l.vtp fibula_l.vtp)
    Body talus_l: mass=0.02683555 mass_center=(0 0 0) inertia=(0.0001467342 0.0001467342 0.0001467342 0 0 0)
        meshes=talus_lv.vtp
    Body calcn_l: mass=0.3354444 mass_center=(0.07394525 0.02218358 0)
        inertia=(0.0002054278 0.0005722638 0.0006016107 0 0 0) meshes=l_foot.vtp
    Body toes_l: mass=0.05812581 mass_center=(0.02558506 0.004436717 0.01294047)
        inertia=(1.467342e-5 2.934684e-5 0.0001467342 0 0 0) meshes=l_bofoot.vtp
    Body torso: mass=9.016745 mass_center=(0.00222114 0.1755162 0) inertia=(0.0850857 0.0893572 0.0893572 0 0 0)
        meshes=(hat_spine.vtp hat_ribs_scap.vtp)
  JointSet:
    CustomJoint ground_pelvis: socket_parent_frame=ground_offset socket_child_frame=pelvis_offset
      Coordinate pelvis_tilt: default_value=0 range=(-3.1416 3.1416) clamped=true
      Coordinate pelvis_list: default_value=0 range=(-3.1416 3.1416) clamped=true
      Coordinate pelvis_rotation: default_value=0 range=(-3.1416 3.1416) clamped=true
      Coordinate pelvis_tx: default_value=0 range=(-10 10) clamped=true
      Coordinate pelvis_ty: default_value=0 range=(-6 6) clamped=true
      Coordinate pelvis_tz: default_value=0 range=(-5 5) clamped=true
      PhysicalOffsetFrame ground_offset: socket_parent=/ground translation=(0 0 0) [meters]
      PhysicalOffsetFrame pelvis_offset: socket_parent=/bodyset/pelvis translation=(0 0 0)
      SpatialTransform:
        TransformAxis rotation1: coordinates=pelvis_tilt axis=(0 0 1) LinearFunction(coefficients=1 0)
        TransformAxis rotation2: coordinates=pelvis_list axis=(1 0 0) LinearFunction(coefficients=1 0)
        TransformAxis rotation3: coordinates=pelvis_rotation axis=(0 1 0) LinearFunction(coefficients=1 0)
        TransformAxis translation1: coordinates=pelvis_tx axis=(1 0 0) LinearFunction(coefficients=1 0)
        TransformAxis translation2: coordinates=pelvis_ty axis=(0 1 0) LinearFunction(coefficients=1 0)
        TransformAxis translation3: coordinates=pelvis_tz axis=(0 0 1) LinearFunction(coefficients=1 0)
    CustomJoint hip_r: socket_parent_frame=pelvis_offset socket_child_frame=femur_r_offset
      Coordinate hip_flexion_r: default_value=0 range=(-2.618 2.094395) clamped=true
      Coordinate hip_adduction_r: default_value=0 range=(-2.094395 2.094395) clamped=true
      Coordinate hip_rotation_r: default_value=0 range=(-2.094395 2.094395) clamped=true
      PhysicalOffsetFrame pelvis_offset: socket_parent=/bodyset/pelvis translation=(-0.03895346 -0.03544545 0.0618474)
      PhysicalOffsetFrame femur_r_offset: socket_parent=/bodyset/femur_r translation=(0 0 0)
      SpatialTransform: axes_held_at_zero=(translation1 translation2 translation3)
        TransformAxis rotation1: coordinates=hip_flexion_r axis=(0 0 1) LinearFunction(coefficients=1 0)
        TransformAxis rotation2: coordinates=hip_adduction_r axis=(1 0 0) LinearFunction(coefficients=1 0)
        TransformAxis rotation3: coordinates=hip_rotation_r axis=(0 1 0) LinearFunction(coefficients=1 0)
    CustomJoint knee_r: socket_parent_frame=femur_r_offset socket_child_frame=tibia_r_offset
      Coordinate knee_angle_r: default_value=0 range=(-3.1416 0.3491) clamped=true
      PhysicalOffsetFrame femur_r_offset: socket_parent=/bodyset/femur_r translation=(0 -0.3063836 0)
      PhysicalOffsetFrame tibia_r_offset: socket_parent=/bodyset/tibia_r translation=(0 0 0)
      SpatialTransform: axes_held_at_zero=(rotation2 rotation3 translation1 translation2 translation3)
        TransformAxis rotation1: coordinates=knee_angle_r axis=(0 0 1) LinearFunction(coefficients=1 0)
    CustomJoint ankle_r: socket_parent_frame=tibia_r_offset socket_child_frame=talus_r_offset
      Coordinate ankle_angle_r: default_value=0 range=(-1.570796 1.570796) clamped=true
      PhysicalOffsetFrame tibia_r_offset: socket_parent=/bodyset/tibia_r translation=(0 -0.3496559 0)
      PhysicalOffsetFrame talus_r_offset: socket_parent=/bodyset/talus_r translation=(0 0 0)
      SpatialTransform: axes_held_at_zero=(rotation2 rotation3 translation1 translation2 translation3)
        TransformAxis rotation1: coordinates=ankle_angle_r axis=(-0.1050135 -0.1740224 0.9791263)
            LinearFunction(coefficients=1 0)
    CustomJoint subtalar_r: socket_parent_frame=talus_r_offset socket_child_frame=calcn_r_offset
      Coordinate subtalar_angle_r: default_value=0 range=(-1.570796 1.570796) clamped=true
      PhysicalOffsetFrame talus_r_offset: socket_parent=/bodyset/talus_r
          translation=(-0.0363042 -0.03122735 0.005895616)
      PhysicalOffsetFrame calcn_r_offset: socket_parent=/bodyset/calcn_r translation=(0 0 0)
      SpatialTransform: axes_held_at_zero=(rotation2 rotation3 translation1 translation2 translation3)
        TransformAxis rotation1: coordinates=subtalar_angle_r axis=(0.7871796 0.6047475 -0.1209495)
            LinearFunction(coefficients=1 0)
    CustomJoint mtp_r: socket_parent_frame=calcn_r_offset socket_child_frame=toes_r_offset
      Coordinate mtp_angle_r: default_value=0 range=(-1.570796 1.570796) clamped=true
      PhysicalOffsetFrame calcn_r_offset: socket_parent=/bodyset/calcn_r
          translation=(0.1330976 -0.001488795 0.0008039469)
      PhysicalOffsetFrame toes_r_offset: socket_parent=/bodyset/toes_r translation=(0 0 0)
      SpatialTransform: axes_held_at_zero=(rotation2 rotation3 translation1 translation2 translation3)
        TransformAxis rotation1: coordinates=mtp_angle_r axis=(-0.5809544 0 0.8139361) LinearFunction(coefficients=1 0)
    CustomJoint hip_l: socket_parent_frame=pelvis_offset socket_child_frame=femur_l_offset
      Coordinate hip_flexion_l: default_value=0 range=(-2.618 2.094395) clamped=true
      Coordinate hip_adduction_l: default_value=0 range=(-2.094395 2.094395) clamped=true
      Coordinate hip_rotation_l: default_value=0 range=(-2.094395 2.094395) clamped=true
      PhysicalOffsetFrame pelvis_offset: socket_parent=/bodyset/pelvis translation=(-0.03895346 -0.03544545 -0.0618474)
      PhysicalOffsetFrame femur_l_offset: socket_parent=/bodyset/femur_l translation=(0 0 0)
      SpatialTransform: axes_held_at_zero=(translation1 translation2 translation3)
        TransformAxis rotation1: coordinates=hip_flexion_l axis=(0 0 1) LinearFunction(coefficients=1 0)
        TransformAxis rotation2: coordinates=hip_adduction_l axis=(-1 0 0) LinearFunction(coefficients=1 0)
        TransformAxis rotation3: coordinates=hip_rotation_l axis=(0 -1 0) LinearFunction(coefficients=1 0)
    CustomJoint knee_l: socket_parent_frame=femur_l_offset socket_child_frame=tibia_l_offset
      Coordinate knee_angle_l: default_value=0 range=(-3.1416 0.3491) clamped=true
      PhysicalOffsetFrame femur_l_offset: socket_parent=/bodyset/femur_l translation=(0 -0.3099562 0)
      PhysicalOffsetFrame tibia_l_offset: socket_parent=/bodyset/tibia_l translation=(0 0 0)
      SpatialTransform: axes_held_at_zero=(rotation2 rotation3 translation1 translation2 translation3)
        TransformAxis rotation1: coordinates=knee_angle_l axis=(0 0 1) LinearFunction(coefficients=1 0)
    CustomJoint ankle_l: socket_parent_frame=tibia_l_offset socket_child_frame=talus_l_offset
      Coordinate ankle_angle_l: default_value=0 range=(-1.047198 1.047198) clamped=true
      PhysicalOffsetFrame tibia_l_offset: socket_parent=/bodyset/tibia_l translation=(0 -0.3374122 0)
      PhysicalOffsetFrame talus_l_offset: socket_parent=/bodyset/talus_l translation=(0 0 0)
      SpatialTransform: axes_held_at_zero=(rotation2 rotation3 translation1 translation2 translation3)
        TransformAxis rotation1: coordinates=ankle_angle_l axis=(0.1050135 0.1740224 0.9791263)
            LinearFunction(coefficients=1 0)
    CustomJoint subtalar_l: socket_parent_frame=talus_l_offset socket_child_frame=calcn_l_offset
      Coordinate subtalar_angle_l: default_value=0 range=(-1.570796 1.570796) clamped=true
      PhysicalOffsetFrame talus_l_offset: socket_parent=/bodyset/talus_l
          translation=(-0.03606306 -0.03102001 -0.005856462)
      PhysicalOffsetFrame calcn_l_offset: socket_parent=/bodyset/calcn_l translation=(0 0 0)
      SpatialTransform: axes_held_at_zero=(rotation2 rotation3 translation1 translation2 translation3)
        TransformAxis rotation1: coordinates=subtalar_angle_l axis=(-0.7871796 -0.6047475 -0.1209495)
            LinearFunction(coefficients=1 0)
    CustomJoint mtp_l: socket_parent_frame=calcn_l_offset socket_child_frame=toes_l_offset
      Coordinate mtp_angle_l: default_value=0 range=(-1.047198 1.047198) clamped=true
      PhysicalOffsetFrame calcn_l_offset: socket_parent=/bodyset/calcn_l
          translation=(0.1322143 -0.001478909 -0.000798609)
      PhysicalOffsetFrame toes_l_offset: socket_parent=/bodyset/toes_l translation=(0 0 0)
      SpatialTransform: axes_held_at_zero=(rotation2 rotation3 translation1 translation2 translation3)
        TransformAxis rotation1: coordinates=mtp_angle_l axis=(0.5809544 0 0.8139361) LinearFunction(coefficients=1 0)
    CustomJoint back: socket_parent_frame=pelvis_offset socket_child_frame=torso_offset
      Coordinate lumbar_extension: default_value=0 range=(-1.570796 1.570796) clamped=true
      Coordinate lumbar_bending: default_value=0 range=(-1.570796 1.570796) clamped=true
      Coordinate lumbar_rotation: default_value=0 range=(-1.570796 1.570796) clamped=true
      PhysicalOffsetFrame pelvis_offset: socket_parent=/bodyset/pelvis translation=(-0.05548252 0.04370355 0)
      PhysicalOffsetFrame torso_offset: socket_parent=/bodyset/torso translation=(0 0 0)
      SpatialTransform: axes_held_at_zero=(translation1 translation2 translation3)
        TransformAxis rotation1: coordinates=lumbar_extension axis=(0 0 1) LinearFunction(coefficients=1 0)
        TransformAxis rotation2: coordinates=lumbar_bending axis=(1 0 0) LinearFunction(coefficients=1 0)
        TransformAxis rotation3: coordinates=lumbar_rotation axis=(0 1 0) LinearFunction(coefficients=1 0)
  ForceSet:
    Thelen2003Muscle glut_med1_r: max_isometric_force=819 optimal_fiber_length=0.03148938
        tendon_slack_length=0.04590976 pennation_angle_at_optimal=0.1396263 [radians] FmaxTendonStrain=0.033
        FmaxMuscleStrain=0.6 KshapeActive=0.5 KshapePassive=4 Af=0.3 Flen=1.8 activation_time_constant=0.01 [seconds]
        deactivation_time_constant=0.04 [seconds]
      PathPoint P1: pelvis (-0.02247947 0.01630171 0.08954914)
      PathPoint P2: femur_r (-0.01712602 -0.009191497 0.04360075)
    Thelen2003Muscle semiten_r: max_isometric_force=410 optimal_fiber_length=0.162944 tendon_slack_length=0.2071253
        pennation_angle_at_optimal=0.08726646 FmaxTendonStrain=0.033 FmaxMuscleStrain=0.6 KshapeActive=0.5
        KshapePassive=4 Af=0.3 Flen=1.8 activation_time_constant=0.01 deactivation_time_constant=0.04
      PathPoint P1: pelvis (-0.06961486 -0.0589221 0.04473014)
      ConditionalPathPoint P2: tibia_r (-0.03048898 -0.02324802 -0.01651755)
          socket_coordinate=/jointset/knee_r/knee_angle_r range=(-0.331613 0.174533) [radians]
      PathPoint P3: tibia_r (-0.02409809 -0.04295068 -0.01659743)
      PathPoint P4: tibia_r (-0.00819714 -0.06066117 -0.01777251)
      PathPoint P5: tibia_r (0.001958611 -0.07773739 -0.01400045)
    Thelen2003Muscle bifemlh_r: max_isometric_force=896 optimal_fiber_length=0.0881541 tendon_slack_length=0.2636535
        pennation_angle_at_optimal=0 FmaxTendonStrain=0.033 FmaxMuscleStrain=0.6 KshapeActive=0.5 KshapePassive=4
        Af=0.3 Flen=1.8 activation_time_constant=0.01 deactivation_time_constant=0.04
      PathPoint P1: pelvis (-0.06940004 -0.05500221 0.05143331)
      PathPoint P2: tibia_r (-0.02183487 -0.02927348 0.02134884)
      PathPoint P3: tibia_r (-0.01697456 -0.04578052 0.02488158)
    Thelen2003Muscle sar_r: max_isometric_force=156 optimal_fiber_length=0.39308 tendon_slack_length=0.0755923
        pennation_angle_at_optimal=0 FmaxTendonStrain=0.033 FmaxMuscleStrain=0.6 KshapeActive=0.5 KshapePassive=4
        Af=0.3 Flen=1.8 activation_time_constant=0.01 deactivation_time_constant=0.04
      PathPoint P1: pelvis (-0.008429824 -0.0006971129 0.09199344)
      PathPoint P2: femur_r (-0.002356799 -0.2803013 -0.0330737)
      PathPoint P3: tibia_r (-0.004062302 -0.03407109 -0.02894383)
      PathPoint P4: tibia_r (0.004352464 -0.04789474 -0.0277832)
      PathPoint P5: tibia_r (0.01762742 -0.06830478 -0.01828039)
    Thelen2003Muscle tfl_r: max_isometric_force=233 optimal_fiber_length=0.07104662 tendon_slack_length=0.3178401
        pennation_angle_at_optimal=0.05235988 FmaxTendonStrain=0.033 FmaxMuscleStrain=0.6 KshapeActive=0.5
        KshapePassive=4 Af=0.3 Flen=1.8 activation_time_constant=0.01 deactivation_time_constant=0.04
      PathPoint P1: pelvis (-0.01713515 0.01147557 0.09191936)
      PathPoint P2: femur_r (0.02309659 -0.07816699 0.04690023)
      PathPoint P3: femur_r (0.00424223 -0.3180891 0.02804582)
      PathPoint P4: tibia_r (0.004352464 -0.03960059 0.02154468)
    Thelen2003Muscle vas_med_r: max_isometric_force=1294 optimal_fiber_length=0.06918809 tendon_slack_length=0.09795168
        pennation_angle_at_optimal=0.08726646 FmaxTendonStrain=0.033 FmaxMuscleStrain=0.6 KshapeActive=0.5
        KshapePassive=4 Af=0.3 Flen=1.8 activation_time_constant=0.01 deactivation_time_constant=0.04
      PathPoint P1: femur_r (0.01099835 -0.1648973 0.01476923)
      PathPoint P2: femur_r (0.02796727 -0.2175325 0.0007070387)
      ConditionalPathPoint P3: femur_r (0.02906717 -0.3180101 -0.009819974)
          socket_coordinate=/jointset/knee_r/knee_angle_r range=(-2.61799 -1.21004)
      ConditionalPathPoint P4: femur_r (0.0215254 -0.3342717 -0.0102913)
          socket_coordinate=/jointset/knee_r/knee_angle_r range=(-2.61799 -1.78006)
      MovingPathPoint P5: tibia_r socket_x_coordinate=/jointset/knee_r/knee_angle_r
          socket_y_coordinate=/jointset/knee_r/knee_angle_r socket_z_coordinate=/jointset/knee_r/knee_angle_r
        x_location: MultiplierFunction: scale=0.7254103
          SimmSpline: x=(-2.0944 -1.99997 -1.5708 -1.45752 -1.39626 -1.0472 -0.698132 -0.526391 -0.349066 -0.174533 0 0.00017453 0.00034907 0.0279253 0.0872665 0.174533 2.0944)
              y=(0.00981097 0.0122243 0.0217371 0.0238851 0.0249902 0.0307959 0.0364187 0.0392871 0.0425654 0.0475764 0.0559586 0.0559681 0.0559776 0.0575419 0.0613368 0.0679503 0.0629332)
        y_location: MultiplierFunction: scale=0.8131527
          SimmSpline: x=(-2.0944 -1.99997 -1.5708 -1.45752 -1.39626 -1.0472 -0.698132 -0.526391 -0.349066 -0.174533 0 0.00017453 0.00034907 0.0279253 0.0872665 0.174533 2.0944)
              y=(0.0224154 0.0227651 0.0241265 0.0242933 0.0243287 0.0239462 0.0233593 0.0230677 0.0228342 0.0226362 0.0217917 0.0217903 0.0217889 0.0215365 0.0206842 0.0183269 -0.0656205)
        z_location: MultiplierFunction: scale=0.7254103
          SimmSpline: x=(-2.0944 2.0944) y=(-0.0146 -0.0146)
    Thelen2003Muscle vas_lat_r: max_isometric_force=1871 optimal_fiber_length=0.06545882 tendon_slack_length=0.1223457
        pennation_angle_at_optimal=0.08726646 FmaxTendonStrain=0.033 FmaxMuscleStrain=0.6 KshapeActive=0.5
        KshapePassive=4 Af=0.3 Flen=1.8 activation_time_constant=0.01 deactivation_time_constant=0.04
      PathPoint P1: femur_r (0.003770872 -0.1456496 0.02741742)
      PathPoint P2: femur_r (0.02113255 -0.2035485 0.032131)
      ConditionalPathPoint P3: femur_r (0.02836012 -0.316596 0.01610478)
          socket_coordinate=/jointset/knee_r/knee_angle_r range=(-2.61799 -1.21004)
      ConditionalPathPoint P4: femur_r (0.01987566 -0.3333293 0.01445503)
          socket_coordinate=/jointset/knee_r/knee_angle_r range=(-2.61799 -1.92004)
      MovingPathPoint P5: tibia_r socket_x_coordinate=/jointset/knee_r/knee_angle_r
          socket_y_coordinate=/jointset/knee_r/knee_angle_r socket_z_coordinate=/jointset/knee_r/knee_angle_r
        x_location: MultiplierFunction: scale=0.7254103
          SimmSpline: x=(-2.0944 -1.99997 -1.5708 -1.45752 -1.39626 -1.0472 -0.698132 -0.526391 -0.349066 -0.174533 0 0.00017453 0.00034907 0.0279253 0.0872665 0.174533 2.0944)
              y=(0.0142897 0.016703 0.0262145 0.0283623 0.0294674 0.0352709 0.0408785 0.0437291 0.0469704 0.0518742 0.0599557 0.0599647 0.0599738 0.0614577 0.0650351 0.0711867 0.0583766)
        y_location: MultiplierFunction: scale=0.8131527
          SimmSpline: x=(-2.0944 -1.99997 -1.5708 -1.45752 -1.39626 -1.0472 -0.698132 -0.526391 -0.349066 -0.174533 0 0.00017453 0.00034907 0.0279253 0.0872665 0.174533 2.0944)
              y=(0.0215318 0.0218815 0.0232362 0.0234019 0.0234371 0.0230439 0.0223842 0.0220151 0.0216359 0.0210971 0.0195864 0.0195842 0.019582 0.01919 0.018008 0.0151073 -0.0653421)
        z_location: MultiplierFunction: scale=0.7254103
          SimmSpline: x=(-2.0944 2.0944) y=(0.0165 0.0165)
    Thelen2003Muscle med_gas_r: max_isometric_force=1558 optimal_fiber_length=0.0486574 tendon_slack_length=0.3162731
        pennation_angle_at_optimal=0.296706 FmaxTendonStrain=0.033 FmaxMuscleStrain=0.6 KshapeActive=0.5
        KshapePassive=4 Af=0.3 Flen=1.8 activation_time_constant=0.01 deactivation_time_constant=0.04
      PathPoint P1: femur_r (-0.01492633 -0.3086611 -0.01846156)
      ConditionalPathPoint P2: femur_r (-0.02356799 -0.3159674 -0.0202684)
          socket_coordinate=/jointset/knee_r/knee_angle_r range=(-0.785398 0.174533)
      PathPoint P3: calcn_r (0 0.0230763 -0.003945301)
    Thelen2003Muscle lat_gas_r: max_isometric_force=683 optimal_fiber_length=0.05191739 tendon_slack_length=0.3082595
        pennation_angle_at_optimal=0.1396263 FmaxTendonStrain=0.033 FmaxMuscleStrain=0.6 KshapeActive=0.5
        KshapePassive=4 Af=0.3 Flen=1.8 activation_time_constant=0.01 deactivation_time_constant=0.04
      PathPoint P1: femur_r (-0.01728312 -0.3099973 0.0213683)
      ConditionalPathPoint P2: femur_r (-0.02356799 -0.3156536 0.0215254)
          socket_coordinate=/jointset/knee_r/knee_angle_r range=(-0.785398 0.174533)
      PathPoint P3: calcn_r (0 0.0230763 -0.003945301)
    Thelen2003Muscle soleus_r: max_isometric_force=3549 optimal_fiber_length=0.04044644 tendon_slack_length=0.2022322
        pennation_angle_at_optimal=0.4363323 FmaxTendonStrain=0.033 FmaxMuscleStrain=0.6 KshapeActive=0.5
        KshapePassive=4 Af=0.3 Flen=1.8 activation_time_constant=0.01 deactivation_time_constant=0.04
      PathPoint P1: tibia_r (-0.001740984 -0.1246563 0.005150416)
      PathPoint P2: calcn_r (0 0.0230763 -0.003945301)
    Thelen2003Muscle tib_post_r: max_isometric_force=1588 optimal_fiber_length=0.02487728 tendon_slack_length=0.2487728
        pennation_angle_at_optimal=0.2094395 FmaxTendonStrain=0.033 FmaxMuscleStrain=0.6 KshapeActive=0.5
        KshapePassive=4 Af=0.3 Flen=1.8 activation_time_constant=0.01 deactivation_time_constant=0.04
      PathPoint P1: tibia_r (-0.006818854 -0.109613 0.001378276)
      PathPoint P2: tibia_r (-0.01044591 -0.3294086 -0.01661189)
      PathPoint P3: calcn_r (0.03104124 0.02486278 -0.02128972)
      PathPoint P4: calcn_r (0.05746729 0.01183591 -0.02091751)
    Thelen2003Muscle tib_ant_r: max_isometric_force=905 optimal_fiber_length=0.07881653 tendon_slack_length=0.1793478
        pennation_angle_at_optimal=0.08726646 FmaxTendonStrain=0.033 FmaxMuscleStrain=0.6 KshapeActive=0.5
        KshapePassive=4 Af=0.3 Flen=1.8 activation_time_constant=0.01 deactivation_time_constant=0.04
      PathPoint P1: tibia_r (0.01298481 -0.1320555 0.008342221)
      PathPoint P2: tibia_r (0.02386605 -0.3212761 -0.01283971)
      PathPoint P3: calcn_r (0.08679657 0.01325028 -0.02270409)
    Thelen2003Muscle per_long_r: max_isometric_force=943 optimal_fiber_length=0.03876637 tendon_slack_length=0.2729469
        pennation_angle_at_optimal=0.1745329 FmaxTendonStrain=0.033 FmaxMuscleStrain=0.6 KshapeActive=0.5
        KshapePassive=4 Af=0.3 Flen=1.8 activation_time_constant=0.01 deactivation_time_constant=0.04
      PathPoint P1: tibia_r (0.0003627048 -0.1275027 0.0262599)
      PathPoint P2: tibia_r (-0.01501598 -0.3419312 0.02074673)
      PathPoint P3: tibia_r (-0.01175168 -0.3512006 0.02096432)
      PathPoint P4: calcn_r (0.03260451 0.01712114 0.01645111)
      PathPoint P5: calcn_r (0.0506933 0.007890592 0.02114082)
      PathPoint P6: calcn_r (0.06342245 0.005136333 0.008783871)
      PathPoint P7: calcn_r (0.08955078 0.006327364 -0.01369689)
    Thelen2003Muscle glut_med1_l: max_isometric_force=819 optimal_fiber_length=0.03162187
        tendon_slack_length=0.04610291 pennation_angle_at_optimal=0.1396263 FmaxTendonStrain=0.033 FmaxMuscleStrain=0.6
        KshapeActive=0.5 KshapePassive=4 Af=0.3 Flen=1.8 activation_time_constant=0.01 deactivation_time_constant=0.04
      PathPoint P1: pelvis (-0.02247947 0.01630171 -0.08954914)
      PathPoint P2: femur_l (-0.01732577 -0.009298697 -0.04410915)
    Thelen2003Muscle semiten_l: max_isometric_force=410 optimal_fiber_length=0.163566 tendon_slack_length=0.2079159
        pennation_angle_at_optimal=0.08726646 FmaxTendonStrain=0.033 FmaxMuscleStrain=0.6 KshapeActive=0.5
        KshapePassive=4 Af=0.3 Flen=1.8 activation_time_constant=0.01 deactivation_time_constant=0.04
      PathPoint P1: pelvis (-0.06961486 -0.0589221 -0.04473014)
      ConditionalPathPoint P2: tibia_l (-0.03092609 -0.02243393 0.01675446)
          socket_coordinate=/jointset/knee_l/knee_angle_l range=(-0.331613 0.174533)
      PathPoint P3: tibia_l (-0.02444367 -0.04144677 0.01683534)
      PathPoint P4: tibia_l (-0.008314668 -0.05853702 0.0180274)
      PathPoint P5: tibia_l (0.00198669 -0.0750153 0.01420117)
    Thelen2003Muscle bifemlh_l: max_isometric_force=896 optimal_fiber_length=0.08869172 tendon_slack_length=0.2652615
        pennation_angle_at_optimal=0 FmaxTendonStrain=0.033 FmaxMuscleStrain=0.6 KshapeActive=0.5 KshapePassive=4
        Af=0.3 Flen=1.8 activation_time_constant=0.01 deactivation_time_constant=0.04
      PathPoint P1: pelvis (-0.06940004 -0.05500221 -0.05143331)
      PathPoint P2: tibia_l (-0.02214792 -0.02824843 -0.02165494)
      PathPoint P3: tibia_l (-0.01721801 -0.04417739 -0.02523834)
    Thelen2003Muscle sar_l: max_isometric_force=156 optimal_fiber_length=0.3945857 tendon_slack_length=0.07588186
        pennation_angle_at_optimal=0 FmaxTendonStrain=0.033 FmaxMuscleStrain=0.6 KshapeActive=0.5 KshapePassive=4
        Af=0.3 Flen=1.8 activation_time_constant=0.01 deactivation_time_constant=0.04
      PathPoint P1: pelvis (-0.008429824 -0.0006971129 -0.09199344)
      PathPoint P2: femur_l (-0.002384279 -0.2835706 0.0334594)
      PathPoint P3: tibia_l (-0.004120543 -0.03287807 0.02935886)
      PathPoint P4: tibia_l (0.00441487 -0.04621756 0.02818162)
      PathPoint P5: tibia_l (0.01788026 -0.065913 0.0185424)
    Thelen2003Muscle tfl_l: max_isometric_force=233 optimal_fiber_length=0.07146231 tendon_slack_length=0.3196998
        pennation_angle_at_optimal=0.05235988 FmaxTendonStrain=0.033 FmaxMuscleStrain=0.6 KshapeActive=0.5
        KshapePassive=4 Af=0.3 Flen=1.8 activation_time_constant=0.01 deactivation_time_constant=0.04
      PathPoint P1: pelvis (-0.01713515 0.01147557 -0.09191936)
      PathPoint P2: femur_l (0.02336597 -0.07907861 -0.04744716)
      PathPoint P3: femur_l (0.004291701 -0.3217987 -0.02837294)
      PathPoint P4: tibia_l (0.00441487 -0.03821388 -0.02185364)
    Thelen2003Muscle vas_med_l: max_isometric_force=1294 optimal_fiber_length=0.07043496 tendon_slack_length=0.09971691
        pennation_angle_at_optimal=0.08726646 FmaxTendonStrain=0.033 FmaxMuscleStrain=0.6 KshapeActive=0.5
        KshapePassive=4 Af=0.3 Flen=1.8 activation_time_constant=0.01 deactivation_time_constant=0.04
      PathPoint P1: femur_l (0.01112667 -0.1668206 -0.01494149)
      PathPoint P2: femur_l (0.02829343 -0.2200694 -0.0007152846)
      ConditionalPathPoint P3: femur_l (0.02940617 -0.3217188 0.009934508)
          socket_coordinate=/jointset/knee_l/knee_angle_l range=(-2.61799 -1.21004)
      ConditionalPathPoint P4: femur_l (0.02177642 -0.3381707 0.01041134)
          socket_coordinate=/jointset/knee_l/knee_angle_l range=(-2.61799 -1.78006)
      MovingPathPoint P5: tibia_l socket_x_coordinate=/jointset/knee_l/knee_angle_l
          socket_y_coordinate=/jointset/knee_l/knee_angle_l socket_z_coordinate=/jointset/knee_l/knee_angle_l
        x_location: MultiplierFunction: scale=0.7358111
          SimmSpline: x=(-2.0944 -1.99997 -1.5708 -1.45752 -1.39626 -1.0472 -0.698132 -0.526391 -0.349066 -0.174533 0 0.00017453 0.00034907 0.0279253 0.0872665 0.174533 2.0944)
              y=(0.00981097 0.0122243 0.0217371 0.0238851 0.0249902 0.0307959 0.0364187 0.0392871 0.0425654 0.0475764 0.0559586 0.0559681 0.0559776 0.0575419 0.0613368 0.0679503 0.0629332)
        y_location: MultiplierFunction: scale=0.784679
          SimmSpline: x=(-2.0944 -1.99997 -1.5708 -1.45752 -1.39626 -1.0472 -0.698132 -0.526391 -0.349066 -0.174533 0 0.00017453 0.00034907 0.0279253 0.0872665 0.174533 2.0944)
              y=(0.0224154 0.0227651 0.0241265 0.0242933 0.0243287 0.0239462 0.0233593 0.0230677 0.0228342 0.0226362 0.0217917 0.0217903 0.0217889 0.0215365 0.0206842 0.0183269 -0.0656205)
        z_location: MultiplierFunction: scale=0.7358111
          SimmSpline: x=(-2.0944 2.0944) y=(0.0146 0.0146)
    Thelen2003Muscle vas_lat_l: max_isometric_force=1871 optimal_fiber_length=0.06653277 tendon_slack_length=0.1243529
        pennation_angle_at_optimal=0.08726646 FmaxTendonStrain=0.033 FmaxMuscleStrain=0.6 KshapeActive=0.5
        KshapePassive=4 Af=0.3 Flen=1.8 activation_time_constant=0.01 deactivation_time_constant=0.04
      PathPoint P1: femur_l (0.003814846 -0.1473485 -0.02773711)
      PathPoint P2: femur_l (0.021379 -0.2059227 -0.03250567)
      ConditionalPathPoint P3: femur_l (0.02869085 -0.3202886 -0.01629254)
          socket_coordinate=/jointset/knee_l/knee_angle_l range=(-2.61799 -1.21004)
      ConditionalPathPoint P4: femur_l (0.02010746 -0.3372168 -0.01462358)
          socket_coordinate=/jointset/knee_l/knee_angle_l range=(-2.61799 -1.92004)
      MovingPathPoint P5: tibia_l socket_x_coordinate=/jointset/knee_l/knee_angle_l
          socket_y_coordinate=/jointset/knee_l/knee_angle_l socket_z_coordinate=/jointset/knee_l/knee_angle_l
        x_location: MultiplierFunction: scale=0.7358111
          SimmSpline: x=(-2.0944 -1.99997 -1.5708 -1.45752 -1.39626 -1.0472 -0.698132 -0.526391 -0.349066 -0.174533 0 0.00017453 0.00034907 0.0279253 0.0872665 0.174533 2.0944)
              y=(0.0142897 0.016703 0.0262145 0.0283623 0.0294674 0.0352709 0.0408785 0.0437291 0.0469704 0.0518742 0.0599557 0.0599647 0.0599738 0.0614577 0.0650351 0.0711867 0.0583766)
        y_location: MultiplierFunction: scale=0.784679
          SimmSpline: x=(-2.0944 -1.99997 -1.5708 -1.45752 -1.39626 -1.0472 -0.698132 -0.526391 -0.349066 -0.174533 0 0.00017453 0.00034907 0.0279253 0.0872665 0.174533 2.0944)
              y=(0.0215318 0.0218815 0.0232362 0.0234019 0.0234371 0.0230439 0.0223842 0.0220151 0.0216359 0.0210971 0.0195864 0.0195842 0.019582 0.01919 0.018008 0.0151073 -0.0653421)
        z_location: MultiplierFunction: scale=0.7358111
          SimmSpline: x=(-2.0944 2.0944) y=(-0.0165 -0.0165)
    Thelen2003Muscle med_gas_l: max_isometric_force=1558 optimal_fiber_length=0.04700516 tendon_slack_length=0.3055336
        pennation_angle_at_optimal=0.296706 FmaxTendonStrain=0.033 FmaxMuscleStrain=0.6 KshapeActive=0.5
        KshapePassive=4 Af=0.3 Flen=1.8 activation_time_constant=0.01 deactivation_time_constant=0.04
      PathPoint P1: femur_l (-0.0151004 -0.3122614 0.01867681)
      ConditionalPathPoint P2: femur_l (-0.02384279 -0.3196523 0.02050477)
          socket_coordinate=/jointset/knee_l/knee_angle_l range=(-0.785398 0.174533)
      PathPoint P3: calcn_l (0 0.02292305 0.003919098)
    Thelen2003Muscle lat_gas_l: max_isometric_force=683 optimal_fiber_length=0.0501351 tendon_slack_length=0.2976772
        pennation_angle_at_optimal=0.1396263 FmaxTendonStrain=0.033 FmaxMuscleStrain=0.6 KshapeActive=0.5
        KshapePassive=4 Af=0.3 Flen=1.8 activation_time_constant=0.01 deactivation_time_constant=0.04
      PathPoint P1: femur_l (-0.01748467 -0.3136128 -0.02161751)
      ConditionalPathPoint P2: femur_l (-0.02384279 -0.3193347 -0.02177642)
          socket_coordinate=/jointset/knee_l/knee_angle_l range=(-0.785398 0.174533)
      PathPoint P3: calcn_l (0 0.02292305 0.003919098)
    Thelen2003Muscle soleus_l: max_isometric_force=3549 optimal_fiber_length=0.03909394 tendon_slack_length=0.1954697
        pennation_angle_at_optimal=0.4363323 FmaxTendonStrain=0.033 FmaxMuscleStrain=0.6 KshapeActive=0.5
        KshapePassive=4 Af=0.3 Flen=1.8 activation_time_constant=0.01 deactivation_time_constant=0.04
      PathPoint P1: tibia_l (-0.001765944 -0.1202909 -0.005224261)
      PathPoint P2: calcn_l (0 0.02292305 0.003919098)
    Thelen2003Muscle tib_post_l: max_isometric_force=1588 optimal_fiber_length=0.02411228 tendon_slack_length=0.2411228
        pennation_angle_at_optimal=0.2094395 FmaxTendonStrain=0.033 FmaxMuscleStrain=0.6 KshapeActive=0.5
        KshapePassive=4 Af=0.3 Flen=1.8 activation_time_constant=0.01 deactivation_time_constant=0.04
      PathPoint P1: tibia_l (-0.006916623 -0.1057747 -0.001398045)
      PathPoint P2: tibia_l (-0.01059564 -0.317873 0.01685005)
      PathPoint P3: calcn_l (0.03083517 0.02469776 0.02114835)
      PathPoint P4: calcn_l (0.05708579 0.01175729 0.02077866)
    Thelen2003Muscle tib_ant_l: max_isometric_force=905 optimal_fiber_length=0.07628473 tendon_slack_length=0.1735867
        pennation_angle_at_optimal=0.08726646 FmaxTendonStrain=0.033 FmaxMuscleStrain=0.6 KshapeActive=0.5
        KshapePassive=4 Af=0.3 Flen=1.8 activation_time_constant=0.01 deactivation_time_constant=0.04
      PathPoint P1: tibia_l (0.01317106 -0.1274324 -0.008461832)
      PathPoint P2: tibia_l (0.02420824 -0.3100263 0.01302381)
      PathPoint P3: calcn_l (0.08622016 0.01316221 0.02255327)
    Thelen2003Muscle per_long_l: max_isometric_force=943 optimal_fiber_length=0.03775049 tendon_slack_length=0.2657942
        pennation_angle_at_optimal=0.1745329 FmaxTendonStrain=0.033 FmaxMuscleStrain=0.6 KshapeActive=0.5
        KshapePassive=4 Af=0.3 Flen=1.8 activation_time_constant=0.01 deactivation_time_constant=0.04
      PathPoint P1: tibia_l (0.0003679052 -0.1230374 -0.02663641)
      PathPoint P2: tibia_l (-0.01523127 -0.3299575 -0.02104425)
      PathPoint P3: tibia_l (-0.01192014 -0.3389023 -0.02126496)
      PathPoint P4: calcn_l (0.03238802 0.0170074 -0.01634195)
      PathPoint P5: calcn_l (0.05035674 0.007838196 -0.02100041)
      PathPoint P6: calcn_l (0.06300134 0.005102219 -0.00872554)
      PathPoint P7: calcn_l (0.08895619 0.006285351 0.01360592)
    Thelen2003Muscle ercspn_r: max_isometric_force=2500 optimal_fiber_length=0.0813627 tendon_slack_length=0.02034068
        pennation_angle_at_optimal=0 FmaxTendonStrain=0.033 FmaxMuscleStrain=0.6 KshapeActive=0.5 KshapePassive=4
        Af=0.3 Flen=1.8 activation_time_constant=0.01 deactivation_time_constant=0.04
      PathPoint P1: pelvis (-0.07713564 0.02354098 0.03229402)
      PathPoint P2: torso (-0.04072091 0.07848288 0.01784317)
    Thelen2003Muscle ercspn_l: max_isometric_force=2500 optimal_fiber_length=0.0813627 tendon_slack_length=0.02034068
        pennation_angle_at_optimal=0 FmaxTendonStrain=0.033 FmaxMuscleStrain=0.6 KshapeActive=0.5 KshapePassive=4
        Af=0.3 Flen=1.8 activation_time_constant=0.01 deactivation_time_constant=0.04
      PathPoint P1: pelvis (-0.07713564 0.02354098 -0.03229402)
      PathPoint P2: torso (-0.04072091 0.07848288 -0.01784317)
    Thelen2003Muscle rect_abd_r: max_isometric_force=263 optimal_fiber_length=0.1439368 tendon_slack_length=0.01093354
      PathPoint P1: pelvis (-0.02291055 -0.04289921 0.007917948)
      PathPoint P2: torso (0.06519784 0.1587991 0.02550609)
    Thelen2003Muscle rect_abd_l: max_isometric_force=263 optimal_fiber_length=0.1439368 tendon_slack_length=0.01093354
      PathPoint P1: pelvis (-0.02291055 -0.04289921 -0.007917948)
      PathPoint P2: torso (0.06519784 0.1587991 -0.02550609)
    ObjectGroup R_hip_abd: members=(glut_med1_r sar_r tfl_r)
    ObjectGroup R_hip_flex: members=(glut_med1_r sar_r tfl_r)
    ObjectGroup R_hip_inrot: members=(glut_med1_r tfl_r)
    ObjectGroup R_hip_exrot
    ObjectGroup R_hip_ext: members=(bifemlh_r semiten_r)
    ObjectGroup R_hip_add: members=(bifemlh_r semiten_r)
    ObjectGroup R_knee_bend: members=(bifemlh_r lat_gas_r med_gas_r sar_r semiten_r)
    ObjectGroup R_knee_ext: members=(vas_lat_r vas_med_r)
    ObjectGroup R_ankle_pf: members=(lat_gas_r med_gas_r soleus_r tib_post_r)
    ObjectGroup R_inverter: members=(tib_ant_r tib_post_r)
    ObjectGroup R_ankle_df: members=tib_ant_r
    ObjectGroup R_everter
    ObjectGroup L_hip_abd: members=(glut_med1_l sar_l tfl_l)
    ObjectGroup L_hip_flex: members=(glut_med1_l sar_l tfl_l)
    ObjectGroup L_hip_inrot: members=(glut_med1_l tfl_l)
    ObjectGroup L_hip_exrot
    ObjectGroup L_hip_ext: members=(bifemlh_l semiten_l)
    ObjectGroup L_hip_add: members=(bifemlh_l semiten_l)
    ObjectGroup L_knee_bend: members=(bifemlh_l lat_gas_l med_gas_l sar_l semiten_l)
    ObjectGroup L_knee_ext: members=(vas_lat_l vas_med_l)
    ObjectGroup L_ankle_pf: members=(lat_gas_l med_gas_l soleus_l tib_post_l)
    ObjectGroup L_inverter: members=(tib_ant_l tib_post_l)
    ObjectGroup L_ankle_df: members=tib_ant_l
    ObjectGroup L_everter
    ObjectGroup back_ext: members=(ercspn_l ercspn_r)
    ObjectGroup back_rlb: members=ercspn_r
    ObjectGroup back_introt: members=ercspn_r
    ObjectGroup back_llb: members=ercspn_l
    ObjectGroup back_extrot: members=ercspn_l
    ObjectGroup back_flex: members=(rect_abd_r rect_abd_l)
    ObjectGroup neck flexion
    ObjectGroup R_shoulder
    ObjectGroup L_shoulder
    ObjectGroup R_elbow
    ObjectGroup L_elbow
    ObjectGroup R_wrist
    ObjectGroup L_wrist
  MarkerSet:
    Marker STR: torso (0.1002004 0.1636142 -0.007918457)
    Marker C7: torso (-0.08437177 0.3405286 0.004911279)
    Marker T10: torso (-0.05418248 0.1511972 0.003076927)
    Marker SUP: torso (0.02813866 0.3188669 0.001992374)
    Marker RASIS: pelvis (0.0001110101 0.02987463 0.1037356)
    Marker LASIS: pelvis (-0.0004225357 0.03601914 -0.1032141)
    Marker LPSIS: pelvis (-0.1233791 0.06962523 -0.04190895)
    Marker RPSIS: pelvis (-0.1268267 0.06680441 0.03434322)
    Marker RLFE: femur_r (0.01885204 -0.3151955 0.03954832)
    Marker RMFE: femur_r (-0.006450187 -0.3199767 -0.05138097)
    Marker RATT: tibia_r (0.03804149 -0.04770326 -0.001149197)
    Marker RLM: tibia_r (-0.01853828 -0.3332428 0.03807384)
    Marker RSPH: tibia_r (0.001109822 -0.3369142 -0.03441575)
    Marker RCAL: calcn_r (-0.02133782 0.02027151 0.003676553)
    Marker RMFH1: calcn_r (0.1453271 0.01831972 -0.03754229)
    Marker RMFH5: calcn_r (0.1174979 -0.005572701 0.04420033)
    Marker RGT: femur_r (0.009402655 -0.02458795 0.0713678)
    Marker LGT: femur_l (-0.006041325 -0.01783055 -0.06424779)
    Marker LLFE: femur_l (0.007408408 -0.3169083 -0.03598127)
    Marker LMFE: femur_l (-0.002515739 -0.3181313 0.04871813)
    Marker LATT: tibia_l (0.0269247 -0.05737174 -0.0003792014)
    Marker LLM: tibia_l (-0.01453736 -0.3372702 -0.03602137)
    Marker LSPH: tibia_l (0.003386586 -0.3297912 0.03773553)
    Marker LCAL: calcn_l (-0.01566033 0.01164449 0.001056986)
    Marker LMFH1: calcn_l (0.1512298 0.01637641 0.03162228)
    Marker LMFH5: calcn_l (0.1095081 -0.009550129 -0.0498383)
    Marker RTT2: toes_r (0.04116263 0.007531493 0.007866087)
    Marker LTT2: toes_l (0.0462794 0.01325914 -0.0187488)
